// COMSOL Multiphysics 5.2.0.166 model "Laplace_Equation.mph"
// Outline of the model tree

Geometry
  geom1 "Geometry 1" (2D, length unit m)
    c1: Circle | r = 1.3
    pt1: Point
    fin: Finalize "Form Union"

Physics
  lpeq: LaplaceEquation on all domains
    dependent variable u
    leq1: LaplaceEquation (default)
    zflx1: ZeroFluxBoundary "Zero Flux 1" (default)
    init1: init "Initial Values 1" (default)
    dir1: DirichletBoundary "Dirichlet Boundary Condition 1" on boundaries 1-4 | r = 0
    ptsrc1: PointSourceTerm "Point Source 1" on points 3 | f = 1.3

Mesh
  mesh1 "Mesh 1"
    size: MeshSizeDefault | hmax = 0.174; hmin = 7.8E-4; hcurve = 0.3; hnarrow = 1; hgrad = 1.3; hauto = 5
    ftri1: FreeTri "Free Triangular 1" on remaining entities
      size1: Size on points 3 | hauto = 5

Studies
  std1 "Study 1"
    stat: Stationary

Solver configurations
  sol1 "Solution 1" (study std1)
    v1: Variables "Dependent Variables 1"
    s1: Stationary "Stationary Solver 1"
      dDef: Direct
      fc1: FullyCoupled | linsolver = dDef

Datasets
  dset1: Solution | solution = sol1

Plots
  pg1: PlotGroup2D "2D Plot Group 1" | data = dset1
    surf1: Surface | expr = u
      hght1: Height "Height Expression 1" | expr = u